// SBML level 2 version 1

model hiv()
  // HIV model which describes the mechanism of irreversible inhibition of HIV proteinase.

  // Compartments:
  compartment rootCompartment = 1;

  // Species:
  substanceOnly species M in rootCompartment = 0;
  substanceOnly species P in rootCompartment = 0;
  substanceOnly species S in rootCompartment = 24.6378;
  substanceOnly species I in rootCompartment = 0;
  substanceOnly species ES in rootCompartment = 0;
  substanceOnly species EP in rootCompartment = 0;
  substanceOnly species E in rootCompartment = 0.005387;
  substanceOnly species EI in rootCompartment = 0;
  substanceOnly species EJ in rootCompartment = 0;

  // Parameters:
  kmd = 0.1;
  kdm = 0.001;
  kon = 100;
  ks = 46.3493;
  kcat = 5.49137;
  kp = 269.804;
  ki = 0.000177;
  kde = 0.000582;

  // Reactions:
  vkmd: 2 M => E; kmd*M*M;
  vkdm: E => 2 M; kdm*E;
  vkcat: ES => P + E; kcat*ES;
  vkonp: P + E => EP; kon*P*E;
  vkons: S + E => ES; kon*S*E;
  vkoni: I + E => EI; kon*I*E;
  vkp: EP => P + E; kp*EP;
  vks: ES => S + E; ks*ES;
  vkde: EI => EJ; kde*EI;
  vki: EI => I + E; ki*EI;
end
