// SBML level 2 version 4

function Function_for_vesd(ES, default0, ks)
  ks*ES/default0;
end

function Function_for_veif(E, I, default0, kon)
  kon*I*E/default0;
end

function Function_for_ved(E, default0, kdm)
  kdm*E/default0;
end

function Function_for_vepf(E, P, default0, kon)
  kon*P*E/default0;
end

function Function_for_vepd(EP, default0, kp)
  kp*EP/default0;
end

function Function_for_vejf(EI, default0, kde)
  kde*EI/default0;
end

function Function_for_vesf(E, S, default0, kon)
  kon*S*E/default0;
end

function Function_for_veid(EI, default0, ki)
  ki*EI/default0;
end

function Function_for_vpf(ES, default0, kcat)
  kcat*ES/default0;
end

function Function_for_vef(M, default0, kmd)
  kmd*M*M/default0;
end

model HIV()
  // NoName

  // Compartments:
  compartment default0 = 1;

  // Species:
  species E in default0 = 0.005387;
  species EI in default0 = 0;
  species EJ in default0 = 0;
  species EP in default0 = 0;
  species ES in default0 = 0;
  species I in default0 = 0;
  species M in default0 = 0;
  species P in default0 = 0;
  species S in default0 = 24.63784;

  // Parameters:
  kcat = 5.491365;
  kde = 0.000582;
  kdm = 0;
  ki = 0.000177;
  kmd = 0.1;
  kon = 100;
  kp = 269.804443;
  ks = 46.349292;

  // Reactions:
  ved: E -> 2 M; default0*Function_for_ved(E, default0, kdm);
  vef: 2 M -> E; default0*Function_for_vef(M, default0, kmd);
  veid: EI -> I + E; default0*Function_for_veid(EI, default0, ki);
  veif: I + E -> EI; default0*Function_for_veif(E, I, default0, kon);
  vejf: EI -> EJ; default0*Function_for_vejf(EI, default0, kde);
  vepd: EP -> P + E; default0*Function_for_vepd(EP, default0, kp);
  vepf: P + E -> EP; default0*Function_for_vepf(E, P, default0, kon);
  vesd: ES -> S + E; default0*Function_for_vesd(ES, default0, ks);
  vesf: S + E -> ES; default0*Function_for_vesf(E, S, default0, kon);
  vpf: ES -> P + E; default0*Function_for_vpf(ES, default0, kcat);
end
