// SBML level 2 version 4

function Function_for_vesd(ES, default, ks)
  ks*ES/default;
end

function Function_for_veif(E, I, default, kon)
  kon*I*E/default;
end

function Function_for_ved(E, default, kdm)
  kdm*E/default;
end

function Function_for_vepf(E, P, default, kon)
  kon*P*E/default;
end

function Function_for_vepd(EP, default, kp)
  kp*EP/default;
end

function Function_for_vejf(EI, default, kde)
  kde*EI/default;
end

function Function_for_vesf(E, S, default, kon)
  kon*S*E/default;
end

function Function_for_veid(EI, default, ki)
  ki*EI/default;
end

function Function_for_vpf(ES, default, kcat)
  kcat*ES/default;
end

function Function_for_vef(M, default, kmd)
  kmd*M*M/default;
end

model HIV()
  // NoName

  // Compartments:
  compartment default = 1;

  // Species:
  species E in default = 0.005387;
  species EI in default = 0;
  species EJ in default = 0;
  species EP in default = 0;
  species ES in default = 0;
  species I in default = 0;
  species M in default = 0;
  species P in default = 0;
  species S in default = 24.63784;

  // Parameters:
  kcat = 5.491365;
  kde = 0.000582;
  kdm = 0;
  ki = 0.000177;
  kmd = 0.1;
  kon = 100;
  kp = 269.804443;
  ks = 46.349292;

  // Reactions:
  ved: E -> 2 M; default*Function_for_ved(E, default, kdm);
  vef: 2 M -> E; default*Function_for_vef(M, default, kmd);
  veid: EI -> I + E; default*Function_for_veid(EI, default, ki);
  veif: I + E -> EI; default*Function_for_veif(E, I, default, kon);
  vejf: EI -> EJ; default*Function_for_vejf(EI, default, kde);
  vepd: EP -> P + E; default*Function_for_vepd(EP, default, kp);
  vepf: P + E -> EP; default*Function_for_vepf(E, P, default, kon);
  vesd: ES -> S + E; default*Function_for_vesd(ES, default, ks);
  vesf: S + E -> ES; default*Function_for_vesf(E, S, default, kon);
  vpf: ES -> P + E; default*Function_for_vpf(ES, default, kcat);
end
