// SBML level 2 version 4

function Function_for_vdeg1(G1, default0, k1)
  k1*G1/default0;
end

function Function_for_vdeg5(E2, default0, k5)
  k5*E2/default0;
end

function Function_for_vdeg3(G3, default0, k3)
  k3*G3/default0;
end

function Function_for_vmet1(E1, Km1, Km2, M1, S, default0, kcat1)
  kcat1*E1*(1/Km1)*(S - M1)/(1 + S/Km1 + M1/Km2)/default0;
end

function Function_for_vmet2(E2, Km3, Km4, M1, M2, default0, kcat2)
  kcat2*E2*(1/Km3)*(M1 - M2)/(1 + M1/Km3 + M2/Km4)/default0;
end

function Function_for_vmet3(E3, Km5, Km6, M2, P, default0, kcat3)
  kcat3*E3*(1/Km5)*(M2 - P)/(1 + M2/Km5 + P/Km6)/default0;
end

function Function_for_vtl1(G1, K4, V4, default0)
  V4*G1/(K4 + G1)/default0;
end

function Function_for_vtl2(G2, K5, V5, default0)
  V5*G2/(K5 + G2)/default0;
end

function Function_for_vdeg2(G2, default0, k2)
  k2*G2/default0;
end

function Function_for_vtl3(G3, K6, V6, default0)
  V6*G3/(K6 + G3)/default0;
end

function Function_for_vdeg4(E1, default0, k4)
  k4*E1/default0;
end

function Function_for_vts1(Ka1, Ki1, P, S, V1, default0, na1, ni1)
  V1/(1 + (P/Ki1)^ni1 + (Ka1/S)^na1)/default0;
end

function Function_for_vdeg6(E3, default0, k6)
  k6*E3/default0;
end

function Function_for_vts3(Ka3, Ki3, M2, P, V3, default0, na3, ni3)
  V3/(1 + (P/Ki3)^ni3 + (Ka3/M2)^na3)/default0;
end

function Function_for_vts2(Ka2, Ki2, M1, P, V2, default0, na2, ni2)
  V2/(1 + (P/Ki2)^ni2 + (Ka2/M1)^na2)/default0;
end

model NoName()

  // Compartments:
  compartment default0 = 1;

  // Species:
  species E1 in default0 = 0.4;
  species E2 in default0 = 0.36409;
  species E3 in default0 = 0.29457;
  species G1 in default0 = 0.66667;
  species G2 in default0 = 0.57254;
  species G3 in default0 = 0.41758;
  species M1 in default0 = 1.419;
  species M2 in default0 = 0.93464;
  species $P in default0 = 0.05;
  species $S in default0 = 0.1;
  species $VOID in default0 = 0;

  // Parameters:
  K4 = 1;
  K5 = 1;
  K6 = 1;
  Ka1 = 1;
  Ka2 = 1;
  Ka3 = 1;
  Ki1 = 1;
  Ki2 = 1;
  Ki3 = 1;
  Km1 = 1;
  Km2 = 1;
  Km3 = 1;
  Km4 = 1;
  Km5 = 1;
  Km6 = 1;
  V1 = 1;
  V2 = 1;
  V3 = 1;
  V4 = 0.1;
  V5 = 0.1;
  V6 = 0.1;
  k1 = 1;
  k2 = 1;
  k3 = 1;
  k4 = 0.1;
  k5 = 0.1;
  k6 = 0.1;
  kcat1 = 1;
  kcat2 = 1;
  kcat3 = 1;
  na1 = 2;
  na2 = 2;
  na3 = 2;
  ni1 = 2;
  ni2 = 2;
  ni3 = 2;

  // Reactions:
  vdeg1: G1 -> $VOID; default0*Function_for_vdeg1(G1, default0, k1);
  vdeg2: G2 -> $VOID; default0*Function_for_vdeg2(G2, default0, k2);
  vdeg3: G3 -> $VOID; default0*Function_for_vdeg3(G3, default0, k3);
  vdeg4: E1 -> $VOID; default0*Function_for_vdeg4(E1, default0, k4);
  vdeg5: E2 -> $VOID; default0*Function_for_vdeg5(E2, default0, k5);
  vdeg6: E3 -> $VOID; default0*Function_for_vdeg6(E3, default0, k6);
  vmet1: $S -> M1; default0*Function_for_vmet1(E1, Km1, Km2, M1, S, default0, kcat1);  // modifiers: E1
  vmet2: M1 -> M2; default0*Function_for_vmet2(E2, Km3, Km4, M1, M2, default0, kcat2);  // modifiers: E2
  vmet3: M2 -> $P; default0*Function_for_vmet3(E3, Km5, Km6, M2, P, default0, kcat3);  // modifiers: E3
  vtl1: $VOID -> E1; default0*Function_for_vtl1(G1, K4, V4, default0);  // modifiers: G1
  vtl2: $VOID -> E2; default0*Function_for_vtl2(G2, K5, V5, default0);  // modifiers: G2
  vtl3: $VOID -> E3; default0*Function_for_vtl3(G3, K6, V6, default0);  // modifiers: G3
  vts1: $VOID -> G1; default0*Function_for_vts1(Ka1, Ki1, P, S, V1, default0, na1, ni1);  // modifiers: S, P
  vts2: $VOID -> G2; default0*Function_for_vts2(Ka2, Ki2, M1, P, V2, default0, na2, ni2);  // modifiers: M1, P
  vts3: $VOID -> G3; default0*Function_for_vts3(Ka3, Ki3, M2, P, V3, default0, na3, ni3);  // modifiers: M2, P
end
